Fri 09/19/2025
05:02 PM
$PROBLEM    PK model
;----------------------------------
$INPUT      C ID TIME TAD DV MDV EVID AMT ADDL II WT HV CRCL AGE SEX
            FOOD RACE ALT AST ALB
;----------------------------------
$DATA      poppk.csv IGNORE=@

;----------------------------------
$SUBROUTINE ADVAN4 TRANS4
;----------------------------------
$PK
;----------------------------------
CL = THETA(1) * EXP(ETA(1))
V2 = THETA(2) * EXP(ETA(2))
Q  = THETA(3) * EXP(ETA(3))
V3 = THETA(4) * EXP(ETA(4))
KA = THETA(5) * EXP(ETA(5))
S2 = V2
;----------------------------------
$THETA  (0,44) ; Clearance
 (0,21) ; Volume central
 (0,19) ; Q
 (0,1115) ; Volume peripheral
 (0,0.2) ; Ka
;----------------------------------
$OMEGA  0.1  ;     IIV CL
 0.1  ;     IIV V2
 0.1  ;      IIV Q
 0.1  ;     IIV V3
 0.1  ;     IIV KA
;----------------------------------
$SIGMA  0.1  ; residual variability
;----------------------------------
$ERROR
;----------------------------------
IPRED = F
IRES = DV-IPRED
W = IPRED
IF (W.EQ.0) W = 1
IWRES = IRES/W
Y= IPRED * (1 + ERR(1))
;----------------------------------

$ESTIMATION METHOD=1 INTER MAXEVAL=9999 PRINT=5 NOABORT POSTHOC
;----------------------------------
$COVARIANCE PRINT=E
;----------------------------------

; OUTPUT
$TABLE      ID TIME TAD DV MDV EVID WT HV CRCL AGE SEX FOOD RACE ALT
            AST ALB CL V2 Q V3 KA ETAS(1:LAST) IPRED IRES IWRES CWRES
            ONEHEADER NOPRINT FILE=ppk3.tab
;----------------------------------

NM-TRAN MESSAGES
 WARNINGS AND ERRORS (IF ANY) FOR PROBLEM    1
 (WARNING  2) NM-TRAN INFERS THAT THE DATA ARE POPULATION.
Note: Analytical 2nd Derivatives are constructed in FSUBS but are never used.
      You may insert $ABBR DERIV2=NO after the first $PROB to save FSUBS construction and compilation time

1NONLINEAR MIXED EFFECTS MODEL PROGRAM (NONMEM) VERSION 7.5.1
 ORIGINALLY DEVELOPED BY STUART BEAL, LEWIS SHEINER, AND ALISON BOECKMANN
 CURRENT DEVELOPERS ARE ROBERT BAUER, ICON DEVELOPMENT SOLUTIONS,
 AND ALISON BOECKMANN. IMPLEMENTATION, EFFICIENCY, AND STANDARDIZATION
 PERFORMED BY NOUS INFOSYSTEMS.
 PROBLEM NO.:         1
 PK model
 TOT. NO. OF OBS RECS:     4472
 TOT. NO. OF INDIVIDUALS:      200
 TWO COMPARTMENT MODEL WITH FIRST-ORDER ABSORPTION (ADVAN4)
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 #TBLN:      1
 #METH: First Order Conditional Estimation with Interaction
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
 #TERM:
0MINIMIZATION SUCCESSFUL
 NO. OF FUNCTION EVALUATIONS USED:      266
 NO. OF SIG. DIGITS IN FINAL EST.:  4.1

 ETABAR IS THE ARITHMETIC MEAN OF THE ETA-ESTIMATES,
 AND THE P-VALUE IS GIVEN FOR THE NULL HYPOTHESIS THAT THE TRUE MEAN IS 0.

 ETABAR:        -3.5228E-03  1.6740E-02 -1.8994E-02 -1.6383E-02  6.1381E-03
 SE:             2.4549E-02  2.4403E-02  4.3447E-02  2.6979E-02  1.6397E-02
 N:                     200         200         200         200         200

 P VAL.:         8.8589E-01  4.9274E-01  6.6199E-01  5.4367E-01  7.0814E-01

 ETASHRINKSD(%)  2.6665E+00  3.0818E+01  1.0376E+01  1.2758E+01  2.7017E+01
 ETASHRINKVR(%)  5.2619E+00  5.2138E+01  1.9675E+01  2.3888E+01  4.6735E+01
 EBVSHRINKSD(%)  2.4837E+00  3.0244E+01  9.0670E+00  1.3048E+01  2.5489E+01
 EBVSHRINKVR(%)  4.9057E+00  5.1341E+01  1.7312E+01  2.4394E+01  4.4481E+01
 RELATIVEINF(%)  9.4522E+01  3.2676E+01  7.8332E+01  7.3461E+01  3.6709E+01
 EPSSHRINKSD(%)  6.8054E+00
 EPSSHRINKVR(%)  1.3148E+01


 TOTAL DATA POINTS NORMALLY DISTRIBUTED (N):         4472
 N*LOG(2PI) CONSTANT TO OBJECTIVE FUNCTION:    8218.9862409825928
 OBJECTIVE FUNCTION VALUE WITHOUT CONSTANT:    17194.024672186883
 OBJECTIVE FUNCTION VALUE WITH CONSTANT:       25413.010913169477
 REPORTED OBJECTIVE FUNCTION DOES NOT CONTAIN CONSTANT

 TOTAL EFFECTIVE ETAS (NIND*NETA):                          1000


 #TERE:
 Elapsed estimation  time in seconds:    74.86
 Elapsed covariance  time in seconds:    73.58
 Elapsed postprocess time in seconds:     0.69

 ********************               FIRST ORDER CONDITIONAL ESTIMATION WITH INTERACTION              ********************
 #OBJT:**************                       MINIMUM VALUE OF OBJECTIVE FUNCTION                      ********************
 #OBJV:********************************************    17194.025       **************************************************

 ********************               FIRST ORDER CONDITIONAL ESTIMATION WITH INTERACTION              ********************
 ********************                             FINAL PARAMETER ESTIMATE                           ********************

 THETA - VECTOR OF FIXED EFFECTS PARAMETERS   *********
         TH 1      TH 2      TH 3      TH 4      TH 5
         1.98E+01  3.78E+01  1.32E+01  3.25E+02  3.01E-01

 OMEGA - COV MATRIX FOR RANDOM EFFECTS - ETAS  ********
         ETA1      ETA2      ETA3      ETA4      ETA5
 ETA1
+        1.27E-01
 ETA2
+        0.00E+00  2.49E-01
 ETA3
+        0.00E+00  0.00E+00  4.70E-01
 ETA4
+        0.00E+00  0.00E+00  0.00E+00  1.91E-01
 ETA5
+        0.00E+00  0.00E+00  0.00E+00  0.00E+00  1.01E-01

 SIGMA - COV MATRIX FOR RANDOM EFFECTS - EPSILONS  ****
         EPS1
 EPS1
+        9.77E-02

 OMEGA - CORR MATRIX FOR RANDOM EFFECTS - ETAS  *******
         ETA1      ETA2      ETA3      ETA4      ETA5
 ETA1
+        3.57E-01
 ETA2
+        0.00E+00  4.99E-01
 ETA3
+        0.00E+00  0.00E+00  6.86E-01
 ETA4
+        0.00E+00  0.00E+00  0.00E+00  4.37E-01
 ETA5
+        0.00E+00  0.00E+00  0.00E+00  0.00E+00  3.18E-01

 SIGMA - CORR MATRIX FOR RANDOM EFFECTS - EPSILONS  ***
         EPS1
 EPS1
+        3.13E-01

 ********************               FIRST ORDER CONDITIONAL ESTIMATION WITH INTERACTION              ********************
 ********************                            STANDARD ERROR OF ESTIMATE                          ********************

 THETA - VECTOR OF FIXED EFFECTS PARAMETERS   *********
         TH 1      TH 2      TH 3      TH 4      TH 5
         5.19E-01  2.48E+00  7.77E-01  1.21E+01  1.22E-02

 OMEGA - COV MATRIX FOR RANDOM EFFECTS - ETAS  ********
         ETA1      ETA2      ETA3      ETA4      ETA5
 ETA1
+        1.17E-02
 ETA2
+       .........  6.23E-02
 ETA3
+       ......... .........  5.38E-02
 ETA4
+       ......... ......... .........  2.39E-02
 ETA5
+       ......... ......... ......... .........  1.78E-02

 SIGMA - COV MATRIX FOR RANDOM EFFECTS - EPSILONS  ****
         EPS1
 EPS1
+        2.59E-03

 OMEGA - CORR MATRIX FOR RANDOM EFFECTS - ETAS  *******
         ETA1      ETA2      ETA3      ETA4      ETA5
 ETA1
+        1.64E-02
 ETA2
+       .........  6.24E-02
 ETA3
+       ......... .........  3.92E-02
 ETA4
+       ......... ......... .........  2.73E-02
 ETA5
+       ......... ......... ......... .........  2.80E-02

 SIGMA - CORR MATRIX FOR RANDOM EFFECTS - EPSILONS  ***
         EPS1
 EPS1
+        4.14E-03
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
 ********************               FIRST ORDER CONDITIONAL ESTIMATION WITH INTERACTION              ********************
 ********************                      EIGENVALUES OF COR MATRIX OF ESTIMATE                     ********************

             1         2         3         4         5         6         7         8         9        10        11
         3.45E-01  5.83E-01  5.91E-01  7.96E-01  9.05E-01  9.63E-01  1.01E+00  1.14E+00  1.30E+00  1.47E+00  1.89E+00
 Elapsed finaloutput time in seconds:     1.64
 #CPUT: Total CPU Time in Seconds,      153.188
